# Лабораторная работа 2.3. Многочлен Ньютона
# Исходные данные:
X := [2.000; 2.500; 3.000; 3.500; 4.000]
Y := [0.010; 1.017; 2.721; 5.149; 8.284]
f(x) := cos(x + 1) + x^3/8
X1 := 3.179
Ay := 0.5*10^-3
# Определим количество узлов:
n := rows(X)
# Построим матрицу разделённых разностей:
dividedDifferences :=
    for i ∈ 0 .. n - 1
        dividedDifferences[i, 0] ← X[i]
        dividedDifferences[i, 1] ← Y[i]
    for j ∈ 2 .. n
        for i ∈ j - 1 .. n - 1
            dividedDifferences[i, j] ← (dividedDifferences[i, j - 1] - dividedDifferences[i - 1, j - 1])/(X[i] - X[i - j + 1])
    dividedDifferences
dividedDifferences = [
    2, 0.01, 0, 0, 0, 0;
    2.5, 1.017, 2.014, 0, 0, 0;
    3, 2.721, 3.408, 1.394, 0, 0;
    3.5, 5.149, 4.856, 1.448, 0.036, 0;
    4, 8.284, 6.27, 1.414, -0.0226667, -0.0293333
]
# Построим многочлен Ньютона:
NewtonPolynomial(X1) :=
    amount ← Y[0]
    composition ← 1
    for i ∈ 1 .. n - 1
        composition ← composition*(X1 - X[i - 1])
        amount ← amount + composition*dividedDifferences[i, i + 1]
    NewtonPolynomial ← amount
# Вычислим значение полинома Ньютона в заданной точке:
NewtonPolynomial(X1) = 3.50697
# Вычислим значение исходной функции в заданной точке:
f(X1) = 3.50743
# Построим график:
m := 0 .. n - 1
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# Вычислим погрешности:
absoluteErrorState := Ay*sum(|NewtonPolynomial(X[i])|, i = 0 .. 4) = 0.0085905
relativeErrorState := absoluteErrorState/|NewtonPolynomial(X1)| = 0.00244955
