# Лабораторная работа 2.6. Формулы Ньютона, Гаусса для равноотстоящих узлов
# Исходные данные:
Y := [6.492; 6.879; 7.340; 7.889; 8.547; 9.339; 10.300; 11.479; 12.939; 14.777; 17.127]
# Определим количество узлов:
n := rows(Y)
# Найдём точки X:
h := (2 - 1)/10
X :=
    for i ∈ 0 .. n - 1
        X[i] ← 1 + i*h
    return X
X = [1; 1.1; 1.2; 1.3; 1.4; 1.5; 1.6; 1.7; 1.8; 1.9; 2]
# Построим таблицу разностей:
differencesTable :=
    for i ∈ 0 .. n - 1
        differencesTable[i, 0] ← Y[i]
    for j ∈ 0 .. n - 2
        for i ∈ 0 .. n - 2 - j
            differencesTable[i, j + 1] ← differencesTable[i + 1, j] - differencesTable[i, j]
    return differencesTable
differencesTable = [
    6.492, 0.387, 0.074, 0.014, 0.007, -0.003, 0.009, -0.011, 0.009, 0.017, -0.104;
    6.879, 0.461, 0.088, 0.021, 0.004, 0.006, -0.002, -0.002, 0.026, -0.087, 0;
    7.34, 0.549, 0.109, 0.025, 0.01, 0.004, -0.004, 0.024, -0.061, 0, 0;
    7.889, 0.658, 0.134, 0.035, 0.014, 0, 0.02, -0.037, 0, 0, 0;
    8.547, 0.792, 0.169, 0.049, 0.014, 0.02, -0.017, 0, 0, 0, 0;
    9.339, 0.961, 0.218, 0.063, 0.034, 0.003, 0, 0, 0, 0, 0;
    10.3, 1.179, 0.281, 0.097, 0.037, 0, 0, 0, 0, 0, 0;
    11.479, 1.46, 0.378, 0.134, 0, 0, 0, 0, 0, 0, 0;
    12.939, 1.838, 0.512, 0, 0, 0, 0, 0, 0, 0, 0;
    14.777, 2.35, 0, 0, 0, 0, 0, 0, 0, 0, 0;
    17.127, 0, 0, 0, 0, 0, 0, 0, 0, 0, 0
]
# Заданная точка:
z := 2.14
# Определим порядок разностей:
Ay := 0.5*10^-3
differencesOrder :=
    for j ∈ 1 .. n - 1
        t ← differencesTable[0, j]
        for i ∈ 0 .. n - 2
            t ← differencesTable[i, j] if |differencesTable[i + 1, j]| > |t|
        if |t| < 2^j*Ay
            return j
            break
differencesOrder = 6
# Построим формулу Ньютона:
t := (z - X[10])/h
Newton :=
    n ← rows(Y) - 1
    flag ← 0
    amount ← differencesTable[n, 0]
    for i ∈ 1 .. n
        composition ← product(t + j, j = 0 .. i - 1)/i!
        amount ← amount + differencesTable[n - i, i]*composition
        flag ← flag + 1
        if flag == differencesOrder - 1
            Newton ← amount
            break
# Вычислим значение Ньютона:
Newton = 21.6166
