# Лабораторная работа 4.1. Вычисление значения интеграла
# Исходные данные:
a := π/2
b := π
f(x) := cos(x + x^2 + sqrt(x))
Ay := 0.5*10^-3
# Вычислим значение интеграла (по формуле трапеций):
Result :=
    previousResult ← 0
    result ← 1
    numberNodes ← 2
    segmentLenght ← (b - a)/numberNodes
    append ← f(a + segmentLenght)
    while |result - previousResult|/3 > Ay
        numberNodes ← numberNodes*2
        segmentLenght ← (b - a)/numberNodes
        for t ∈ a + segmentLenght, a + 3*segmentLenght .. b - segmentLenght
            append ← append + f(t)
        previousResult ← result
        result ← segmentLenght/2*(f(a) + f(b) + 2*append)
    Result ← result
    Result ← numberNodes
    [result; numberNodes]
Result = [0.298079; 64]
