# 4.2. Вычисление значения интеграла. Методы Гаусса и Чебышёва
# Общие исходные данные:
f(t) := cos(t + t^2 + sqrt(t))
a := π/2
b := π
Ay := 0.5*10^-10
# Исходные данные для метода Гаусса при n = 6 и n = 7:
gaussValuesA6 := [0.1713244; 0.3607615; 0.4679139; 0.4679139; 0.3607615; 0.1713244]
gaussValuesX6 := [-0.9324695; -0.6612093; -0.2386191; 0.2386191; 0.6612093; 0.9324695]
gaussValuesA7 := [0.1294849; 0.2797053; 0.3818300; 0.4179591; 0.3818300; 0.2797053; 0.1294849]
gaussValuesX7 := [-0.9491079; -0.7415311; -0.4058451; 0.0000000; 0.4058451; 0.7415311; 0.9491079]
# Исходные данные для метода Чебышёва при n = 6 и n = 7:
chebyshevValuesX6 := [-0.8662468; -0.4225186; -0.26663540; 0.26663540; 0.4225186; 0.8662468]
chebyshevValuesX7 := [-0.8838617; -0.5296567; -0.3239118; 0.0000000; 0.3239118; 0.5296567; 0.8838617]
# Вычислим интеграл методом Гаусса для n = 6:
GaussFor6 := ((b - a)/2)*sum(gaussValuesA6[k]*f((b + a)/2 + gaussValuesX6[k]*(b - a)/2), k = 0 .. rows(gaussValuesA6) - 1)
GaussFor6 = 0.298398
# Уточним значение интеграла:
ClarifyGaussFor6 :=
    m ← 2
    GaussFor6(m) ← ((b - a)/(2*m))*sum(sum(gaussValuesA6[k]*f(a + (b - a)/(2*m)*(gaussValuesX6[k] + 2*i - 1)), k = 0 .. rows(gaussValuesA6) - 1), i = 1 .. m)
    while |GaussFor6(m + 1) - GaussFor6(m)| > Ay
        m ← m + 1
    ClarifyGaussFor6 ← GaussFor6(m)
    ClarifyGaussFor6 ← m
    [GaussFor6(m); m]
ClarifyGaussFor6 = [0.298573; 24]
# Вычислим интеграл методом Гаусса для n = 7:
GaussFor7 := ((b - a)/2)*sum(gaussValuesA7[k]*f((b + a)/2 + gaussValuesX7[k]*(b - a)/2), k = 0 .. rows(gaussValuesA7) - 1)
GaussFor7 = 0.298589
# Уточним значение интеграла:
ClarifyGaussFor7 :=
    m ← 2
    GaussFor7(m) ← ((b - a)/(2*m))*sum(sum(gaussValuesA7[k]*f(a + (b - a)/(2*m)*(gaussValuesX7[k] + 2*i - 1)), k = 0 .. rows(gaussValuesA7) - 1), i = 1 .. m)
    while |GaussFor7(m + 1) - GaussFor7(m)| > Ay
        m ← m + 1
    ClarifyGaussFor7 ← GaussFor7(m)
    ClarifyGaussFor7 ← m
    [GaussFor7(m); m]
ClarifyGaussFor7 = [0.298573; 22]
# Вычислим интеграл методом Чебышёва для n = 6:
ChebyshevFor6 := ((b - a)/2)*sum(f((b + a)/2 + chebyshevValuesX6[k]*(b - a)/2), k = 0 .. rows(chebyshevValuesX6) - 1)*2/rows(chebyshevValuesX6)
ChebyshevFor6 = 0.325603
# Уточним значение интеграла:
ClarifyChebyshevFor6 :=
    m ← 2
    ChebyshevFor6(m) ← ((b - a)/(rows(chebyshevValuesX6)*m))*sum(sum(f(a + (b - a)/(2*m)*(chebyshevValuesX6[k] + 2*i - 1)), k = 0 .. rows(chebyshevValuesX6) - 1), i = 1 .. m)
    while |ChebyshevFor6(m + 1) - ChebyshevFor6(m)| > Ay
        m ← m + 1
    ClarifyChebyshevFor6 ← ChebyshevFor6(m)
    ClarifyChebyshevFor6 ← m
    [ChebyshevFor6(m); m]
ClarifyChebyshevFor6 = [0.298573; 10]
# Вычислим интеграл методом Чебышёва для n = 7:
ChebyshevFor7 := ((b - a)/2)*sum(f((b + a)/2 + chebyshevValuesX7[k]*(b - a)/2), k = 0 .. rows(chebyshevValuesX7) - 1)*2/rows(chebyshevValuesX7)
ChebyshevFor7 = 0.313728
# Уточним значение интеграла:
ClarifyChebyshevFor7 :=
    m ← 2
    ChebyshevFor7(m) ← ((b - a)/(rows(chebyshevValuesX7)*m))*sum(sum(f(a + (b - a)/(2*m)*(chebyshevValuesX7[k] + 2*i - 1)), k = 0 .. rows(chebyshevValuesX7) - 1), i = 1 .. m)
    while |ChebyshevFor7(m + 1) - ChebyshevFor7(m)| > Ay
        m ← m + 1
    ClarifyChebyshevFor7 ← ChebyshevFor7(m)
    ClarifyChebyshevFor7 ← m
    [ChebyshevFor7(m); m]
ClarifyChebyshevFor7 = [0.298573; 9]
# Результаты вычислений:
ClarifyGaussFor6 = [0.298573; 24]
ClarifyChebyshevFor6 = [0.298573; 10]
ClarifyGaussFor7 = [0.298573; 22]
ClarifyChebyshevFor7 = [0.298573; 9]
